// COMSOL Multiphysics 5.2.0.166 model "sweep_25_empty.mph"
// Untitled\n\n
// Outline of the model tree

Parameters
  alpha = 1
  beta = 0.021544
  gamma = 2.7826
  kde = 0.34
  ked = 0.01
  kdD = 0.02
  kD = 0.065
  kdEr = 0.126
  kdEl = 0.0002/10
  ke = 0.0001*100*10
  mu = 100
  lamDD = 6
  nD = 1000
  nE = 800
  DiffuDD = DiffC
  DiffuDT = DiffC
  DiffuEr = DiffC
  DiffuEl = DiffC
  Diffud = 0.013*gamma
  Diffude = 0.013*gamma
  Diffue = 0.005*gamma
  LX = 50
  LY = 50
  noisescale = 0.25
  IC_amplitude = 0.0
  DiffC = 60
  Diffud_biharm = Diffud*lengthcutoff^2
  Diffude_biharm = Diffude*lengthcutoff^2
  Diffue_biharm = Diffue*lengthcutoff^2
  lengthcutoff = 0.1
  cmax_surf = 20000
  cmax_vol = cmax_surf*alpha

Functions
  rn1: Random | nargs = 2; type = normal

Geometry
  geom1 "Geometry 1" (2D, length unit m)
    r1: Rectangle | base = center; size = {LX, LY}
    fin: Finalize "Form Union"

Physics
  w: WeakFormPDE on all domains
    dependent variable u = {uDD, uDT, uEr, uEl, ud, ude, ue}
    wfeq1: WeakFormPDE "diffusion" (default)
      weak = {(-test(uDDx)*uDDx-test(uDDy)*uDDy)*DiffuDD, (-test(uDTx)*uDTx-test(uDTy)*uDTy)*DiffuDT, (-test(uErx)*uErx-test(uEry)*uEry)*DiffuEr, (-test(uElx)*uElx-test(uEly)*uEly)*DiffuEl, (-test(udx)*udx-test(udy)*udy)*Diffud, (-test(udex)*udex-test(udey)*udey)*Diffude, (-test(uex)*uex-test(uey)*uey)*Diffue}
    zflx1: ZeroFluxBoundary "Zero Flux 1" (default)
    init1: init "Initial Values 1" (default)
      uDD = (nD/2)*(1+rn1(x,y)*noisescale+IC_amplitude*cos(2*pi*x/LX)*cos(2*pi*y/LY) )
      uEr = (nE/2)*(1+rn1(x,y)*noisescale+IC_amplitude*cos(2*pi*x/LX)*cos(2*pi*y/LY) )
      ud = (nD/2)*(1+rn1(x,y)*noisescale+IC_amplitude*cos(2*pi*x/LX)*cos(2*pi*y/LY) )
      ue = (nE/2)*(1+rn1(x,y)*noisescale-IC_amplitude*cos(2*pi*x/LX)*cos(2*pi*y/LY))
    wfeq2: WeakFormPDE "reactions" on all domains
      weak = {(-lamDD*uDD+kde*ude)*test(uDD), (lamDD*uDD-(kD*alpha*beta + beta*kdD*ud)*uDT*(cmax_vol-ud-ude)/cmax_vol)*test(uDT), (-mu*uEr - ud*(beta*kdEr*uEr) + ke*ue)*test(uEr), (mu*uEr - ud*(beta*kdEl*uEl))*test(uEl), ((beta*kD*alpha+ beta*kdD*ud)*uDT*(cmax_vol-ud-ude)/cmax_vol - ud*beta*(kdEr*uEr + kdEl*uEl) - ked*ud*ue/alpha)*test(ud), (ud*beta*(kdEr*uEr + kdEl*uEl) - kde*ude + ked*ud*ue/alpha)*test(ude), (kde*ude - ked*ud*ue/alpha - ke*ue)*test(ue)}
    wfeq3: WeakFormPDE "time derivative" on all domains
      weak = {-uDDt*test(uDD), -uDTt*test(uDT), -uErt*test(uEr), -uElt*test(uEl), -udt*test(ud), -udet*test(ude), -uet*test(ue)}

Mesh
  mesh1 "Mesh 1"
    size: MeshSizeDefault | hmax = 1; hmin = 0.03; hauto = 5; custom = on
    auto_f1: FreeTri "Free Triangular 1" on remaining entities

Studies
  std1 "Study 1"
    time: Transient "Time Dependent" | tlist = range(0,10,5000); rtol = 1e-5

Solver configurations
  sol1 "Solution 1" (study std1)
    v1: Variables "Dependent Variables 1"
    t1: Time "Time-Dependent Solver 1" | tlist = range(0,10,5000); rtol = 1e-5
      dDef: Direct
      fc1: FullyCoupled
      st1: StopCondition | stopcondterminateon = true; stopconddesc = {Stop, expression, 1}; stopcondarr = timestep<1e-5

Datasets
  dset1: Solution | solution = sol1